# OpenSim document version 40600
Model DetailedBicycleModel:
  Ground
  BodySet:
    Body frame: mass=12 [kg] mass_center=(0 0 0) inertia=(1 1 1 0 0 0)
      Brick frame_geom_1: half_lengths=(0.5555 0.02 0.02)
      Brick frame_geom_2: half_lengths=(0.27 0.02 0.02)
      Brick frame_geom_3: half_lengths=(0.2025 0.02 0.02)
      Cylinder frame_geom_4: radius=0.03 half_height=0.12
      Cylinder frame_geom_5: radius=0.03 half_height=0.12
    Body front_wheel: mass=1.6 mass_center=(0 0 0) inertia=(1 1 1 0 0 0)
      Cylinder front_wheel_geom_1: radius=0.34 half_height=0.02
    Body rear_wheel: mass=1.6 mass_center=(0 0 0) inertia=(1 1 1 0 0 0)
      Cylinder rear_wheel_geom_1: radius=0.34 half_height=0.02
    Body crank: mass=0.8 mass_center=(0 0 0) inertia=(1 1 1 0 0 0)
      Brick crank_geom_1: half_lengths=(0.5555 0.02 0.02)
      Brick crank_geom_2: half_lengths=(0.27 0.02 0.02)
      Brick crank_geom_3: half_lengths=(0.2025 0.02 0.02)
      Cylinder crank_geom_4: radius=0.03 half_height=0.12
      Cylinder crank_geom_5: radius=0.03 half_height=0.12
    Body left_pedal: mass=0.2 mass_center=(0 0 0) inertia=(1 1 1 0 0 0)
      Brick left_pedal_geom_1: half_lengths=(0.08 0.02 0.04)
    Body right_pedal: mass=0.2 mass_center=(0 0 0) inertia=(1 1 1 0 0 0)
      Brick right_pedal_geom_1: half_lengths=(0.08 0.02 0.04)
    Body saddle: mass=0.6 mass_center=(0 0 0) inertia=(1 1 1 0 0 0)
      Brick saddle_geom_1: half_lengths=(0.063 0.02 0.08)
    Body handlebar: mass=0.6 mass_center=(0 0 0) inertia=(1 1 1 0 0 0)
      Brick handlebar_geom_1: half_lengths=(0.21 0.02 0.02)
      Cylinder handlebar_geom_2: radius=0.02 half_height=0.06
  JointSet:
    WeldJoint ground_to_frame: socket_parent_frame=ground_offset socket_child_frame=frame_offset
      PhysicalOffsetFrame ground_offset: socket_parent=/ground translation=(0 0 0) [meters]
      PhysicalOffsetFrame frame_offset: socket_parent=/bodyset/frame translation=(0 0 0)
    PinJoint frame_to_front_wheel: socket_parent_frame=frame_offset socket_child_frame=front_wheel_offset
      Coordinate frame_to_front_wheel_coord_0
      PhysicalOffsetFrame frame_offset: socket_parent=/bodyset/frame translation=(0.505 0 0)
      PhysicalOffsetFrame front_wheel_offset: socket_parent=/bodyset/front_wheel translation=(0 0 0)
    PinJoint frame_to_rear_wheel: socket_parent_frame=frame_offset socket_child_frame=rear_wheel_offset
      Coordinate frame_to_rear_wheel_coord_0
      PhysicalOffsetFrame frame_offset: socket_parent=/bodyset/frame translation=(-0.505 0 0)
      PhysicalOffsetFrame rear_wheel_offset: socket_parent=/bodyset/rear_wheel translation=(0 0 0)
    PinJoint frame_to_crank: socket_parent_frame=frame_offset socket_child_frame=crank_offset
      Coordinate frame_to_crank_coord_0
      PhysicalOffsetFrame frame_offset: socket_parent=/bodyset/frame translation=(0 -0.05 0)
      PhysicalOffsetFrame crank_offset: socket_parent=/bodyset/crank translation=(0 0 0)
    PinJoint crank_to_left_pedal: socket_parent_frame=crank_offset socket_child_frame=left_pedal_offset
      Coordinate crank_to_left_pedal_coord_0
      PhysicalOffsetFrame crank_offset: socket_parent=/bodyset/crank translation=(-0.08625 0 0)
      PhysicalOffsetFrame left_pedal_offset: socket_parent=/bodyset/left_pedal translation=(0 0 0)
    PinJoint crank_to_right_pedal: socket_parent_frame=crank_offset socket_child_frame=right_pedal_offset
      Coordinate crank_to_right_pedal_coord_0
      PhysicalOffsetFrame crank_offset: socket_parent=/bodyset/crank translation=(0.08625 0 0)
      PhysicalOffsetFrame right_pedal_offset: socket_parent=/bodyset/right_pedal translation=(0 0 0)
    WeldJoint frame_to_saddle: socket_parent_frame=frame_offset socket_child_frame=saddle_offset
      PhysicalOffsetFrame frame_offset: socket_parent=/bodyset/frame translation=(0 0.37 0)
      PhysicalOffsetFrame saddle_offset: socket_parent=/bodyset/saddle translation=(0 0 0)
    WeldJoint frame_to_handlebar: socket_parent_frame=frame_offset socket_child_frame=handlebar_offset
      PhysicalOffsetFrame frame_offset: socket_parent=/bodyset/frame translation=(0.1575 0.21 0)
      PhysicalOffsetFrame handlebar_offset: socket_parent=/bodyset/handlebar translation=(0 0 0)
