# OpenSim document version 40600
Model SimpleBicycleModel:
  Ground
  BodySet:
    Body bike_frame: mass=10 [kg] mass_center=(0 0 0) inertia=(1 1 1 0 0 0)
      Brick bike_frame_geom_1: half_lengths=(0.5 0.02 0.02)
    Body crank: mass=0.5 mass_center=(0 0 0) inertia=(0.01 0.01 0.01 0 0 0)
  JointSet:
    WeldJoint ground_to_bike: socket_parent_frame=ground_offset socket_child_frame=bike_frame_offset
      PhysicalOffsetFrame ground_offset: socket_parent=/ground translation=(0 1 0) [meters]
      PhysicalOffsetFrame bike_frame_offset: socket_parent=/bodyset/bike_frame translation=(0 0 0)
    PinJoint bottom_bracket: socket_parent_frame=bike_frame_offset socket_child_frame=crank_offset
      Coordinate bottom_bracket_coord_0
      PhysicalOffsetFrame bike_frame_offset: socket_parent=/bodyset/bike_frame translation=(0 -0.5 0)
      PhysicalOffsetFrame crank_offset: socket_parent=/bodyset/crank translation=(0 0 0)
